! GUID 9f9a099c-8863-4bcf-af1f-78ff9a1c0571
! Material 1 = Carbon Fiber (230 GPa)
MP,EX,1,230000000000,	! Pa
MP,EY,1,23000000000,	! Pa
MP,EZ,1,23000000000,	! Pa
MP,PRXY,1,0.2,
MP,PRYZ,1,0.4,
MP,PRXZ,1,0.2,
MP,GXY,1,9000000000,	! Pa
MP,GYZ,1,8214285714,	! Pa
MP,GXZ,1,9000000000,	! Pa
MP,DENS,1,1800,	! kg m^-3

! GUID 12d6a61a-827f-4f84-8206-54f3186f9077
! Material 2 = Resin Epoxy
MP,DENS,2,1160,	! kg m^-3
MP,EX,2,3780000000,	! Pa
MP,NUXY,2,0.35,
